// COMSOL Multiphysics 5.6.0.401 model "Untitled.mph"
// Outline of the model tree

Parameters
  ncore = 1.461
  nclad = 1.4565
  rcore = 1[um]
  rclad = 1.5[um]
  wave_len = 1.55[um]
  fiber_len = 10[um]

Coordinate systems
  pml1: PML "完美匹配层 1" on domains 2-4, 6, 10, 12-14

Geometry
  geom1 "几何 1" (2D, length unit m)
    r1: Rectangle "包层"
      base = center
      layername = 层 1
      layer = 1E-7
      layerleft = on
      layerright = on
      layertop = on
      size = {fiber_len, 2*rclad}
    r2: Rectangle "纤芯" | base = center; size = {fiber_len, 2*rcore}
    fin: Finalize "形成联合体"

Materials
  mat1: Common "材料 1" on domains 3, 8, 13
    RefractiveIndex "折射率"
      n = ncore
      ki = 0
  mat2: Common "材料 2" on domains 1, 2, 4-7, 9-12, 14, 15
    RefractiveIndex "折射率"
      n = nclad
      ki = 0

Physics
  ewfd: ElectromagneticWavesFrequencyDomain "电磁波，频域" on all domains
    dependent variable E = {Ex, Ey, Ez}
    wee1: WaveEquationElectric "波动方程，电 1" (default)
    pec1: PerfectElectricConductor "理想电导体 1" (default)
    init1: init "初始值 1" (default)
    sctr1: Scattering "散射边界条件 1" on boundaries 1-3, 5, 7, 9, 11, 13, 22, 24, 33-38
    port1: Port "端口 1" on boundaries 14, 16, 18
      PortSlit = 1
      SlitType = DomainBacked
      PortOrientation = ReversePort
      PortType = Numeric
    port2: Port "端口 2" on boundaries 25, 27, 29
      PortSlit = 1
      SlitType = DomainBacked
      PortOrientation = ForwardPort
      PortType = Numeric

Mesh
  mesh1 "网格 1"
    size: MeshSizeDefault "大小" | hmax = 6.7E-7
    ftri1: FreeTri "自由三角形网格 1" on domains 7-9
      size1: Size "大小 1" on domains 7-9 | hmax = wave_len/20; custom = on
    map1: Map "映射 1" on domains 1-6, 10-15

Studies
  std1 "研究 1"
    bma: BoundaryModeAnalysis "边界模式分析" | modeFreq = c_const/wave_len; shift = ncore; conrad = 1
    bma1: BoundaryModeAnalysis "边界模式分析 1" | PortName = 2; modeFreq = c_const/wave_len; shift = ncore; conrad = 1
    freq: Frequency "频域" | punit = THz; plist = c_const/wave_len

Solver configurations
  sol1 "解 1" (study std1)
    v1: Variables "因变量 1"
    e1: Eigenvalue "特征值求解器 1" | neigs = 1; shift = ncore; eigref = ncore
      d1: Direct "建议的直接求解器 (ewfd)"
    su1: StoreSolution "解存储 1"
    v2: Variables "因变量 2" | initmethod = sol; notsolmethod = sol
    e2: Eigenvalue "特征值求解器 2" | neigs = 1; shift = ncore; eigref = ncore
      d1: Direct "建议的直接求解器 (ewfd)"
    su2: StoreSolution "解存储 2"
    v3: Variables "因变量 3" | initmethod = sol; notsolmethod = sol
    s1: Stationary "稳态求解器 1" | stol = 0.01
      p1: Parametric "参数化 1" | pname = freq; plistarr = c_const/wave_len; punit = THz; pcontinuationmode = no
      fc1: FullyCoupled "全耦合 1" | linsolver = d1
      d1: Direct "建议的直接求解器 (ewfd)"
  sol3 "解存储 2" (study std1)
  sol2 "解存储 1" (study std1)

Datasets
  dset1: Solution | solution = sol1
  dset2: Solution | solution = sol2
  dset3: Solution | solution = sol3

Derived values
  gev1: EvalGlobal "反射率、透射率和吸收率 (ewfd)"
    data = dset1
    table = tbl1
    expr = {ewfd.Rport_1, ewfd.Rtotal, ewfd.Tport_2, ewfd.Ttotal, ewfd.RTtotal, ewfd.Atotal}

Tables
  tbl1: Table "表格 1"
    freq (THz) | 反射率，端口 1 (1) | 总反射率 (1) | 透射率，端口 2 (1) | 总透射率 (1) | 总反射率和透射率 (1) | 吸收率 (1)
    193.414 | 0.0512622 | 0.0512622 | 0.619084 | 0.619084 | 0.670346 | 0.329654

Plots
  pg1: PlotGroup2D "电场 (ewfd)" | data = dset1
    surf1: Surface "表面 1" | expr = ewfd.normE